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/batch
! ANSYS input file written by Workbench version 15.0  Release
! File used for geometry attach: G:\RV3-2body_design\4strength_check\ansysfiles\J1_J2_files\dp0\Geom\DM\Geom.agdb
/title,J1_J2--Static Structural (B5)
/com,--- Data in consistent MKS units.
/units,MKS
/prep7
! Turn off shape checking because checks already performed inside WB mesher.
! See help system for more information.
SHPP,OFF,,NOWARN
etcon,set             ! allow ANSYS to choose best KEYOP's for 180x elements
/com,*********** Nodes for the whole assembly ***********
nblock,3
(1i9,3e20.9e3)
        1   -1.005360993E-001    1.100741390E-001    2.332000000E-002
        2   -9.005036762E-002    1.100741390E-001    2.332000000E-002
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-1
/com,*********** Elements for Body 1 "J2 Turret Housing" ***********
et,1,187
eblock,19,solid,,8480
(19i9)
        1        1        1        1        0        0        0        0       10        0        1     1442     1482     1805     1458    10915    11101    10917    10912
    11016    11018
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-1
/com,*********** Send User Defined Coordinate System(s) ***********
csys,0
toffst,273.15,  ! Temperature offset from absolute zero
/com,*********** Set Reference Temperature ***********
tref,22.
/com,*********** Send Materials ***********
MP,DENS,1,2770,	! kg m^-3
MP,ALPX,1,2.3e-05,	! C^-1
MP,C,1,875,	! J kg^-1 C^-1
MPTEMP,,,,,,,,
MPTEMP,1,-100
MPTEMP,2,0
MPTEMP,3,100
MPTEMP,4,200
MPDATA,KXX,1, ,114,144,165,175,	! W m^-1 C^-1
MPTEMP,,,,,,,,
MPTEMP,,,,,,,,
MPTEMP,1,0
MPTEMP,2,20
MPTEMP,3,100
MPDATA,RSVX,1, ,2.43e-08,2.67e-08,3.63e-08,	! kg m^3 A^-2 s^-3
MPTEMP,,,,,,,,
MP,EX,1,71000000000,	! Pa
MP,NUXY,1,0.33,
MP,MURX,1,1,

!************************* Model Summary ********************
!J2 Turret Housing,	Aluminum Alloy,	matid,	1
!************************* End Model Summary ********************
/com,*********** Fixed Supports ***********
CMBLOCK,_FIXEDSU,NODE,      579
(8i10)
        29        30        31        32        59        60        61        62
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cmsel,s,_FIXEDSU
d,all,all
nsel,all
nsel,all
/com,*********** Define Force Using Surface Effect Elements ***********
local,12,0,0.,0.,0.,-0.,0.,0.
csys,0
et,2,154
eblock,10,,,194
(15i9)
     8481        2        2        2       12      188      187     1165     1165     3865     3867     1165     3872
     8482        2        2        2       12      187      161      763      763     3604     3606      763     3866
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-1
esel,s,type,,2
keyop,2,2,1                ! Apply load in local coordinate system
keyop,2,7,1                ! Use original area so load is constant in large deformation
keyop,2,11,2               ! Use real and not project area
esel,all

*DIM,_loadvari26x,TABLE,2,1,1,TIME,
! Time values
_loadvari26x(1,0,1) = 0.
_loadvari26x(2,0,1) = 1.
! Load values
_loadvari26x(1,1,1) = -8869.26255150551
_loadvari26x(2,1,1) = -8869.26255150551


*DIM,_loadvari26y,TABLE,2,1,1,TIME,
! Time values
_loadvari26y(1,0,1) = 0.
_loadvari26y(2,0,1) = 1.
! Load values
_loadvari26y(1,1,1) = 0.
_loadvari26y(2,1,1) = 0.


*DIM,_loadvari26z,TABLE,2,1,1,TIME,
! Time values
_loadvari26z(1,0,1) = 0.
_loadvari26z(2,0,1) = 1.
! Load values
_loadvari26z(1,1,1) = 0.
_loadvari26z(2,1,1) = 0.

/com,*********** Define Force Using Surface Effect Elements ***********
local,13,0,0.,0.,0.,-0.,0.,0.
csys,0
et,3,154
eblock,10,,,192
(15i9)
     8675        3        3        3       13      169      168     1373     1373     3676     3680     1373     3690
     8676        3        3        3       13      167      166     1372     1372     3652     3657     1372     3669
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-1
esel,s,type,,3
keyop,3,2,1                ! Apply load in local coordinate system
keyop,3,7,1                ! Use original area so load is constant in large deformation
keyop,3,11,2               ! Use real and not project area
esel,all

*DIM,_loadvari28x,TABLE,2,1,1,TIME,
! Time values
_loadvari28x(1,0,1) = 0.
_loadvari28x(2,0,1) = 1.
! Load values
_loadvari28x(1,1,1) = -8869.26350423411
_loadvari28x(2,1,1) = -8869.26350423411


*DIM,_loadvari28y,TABLE,2,1,1,TIME,
! Time values
_loadvari28y(1,0,1) = 0.
_loadvari28y(2,0,1) = 1.
! Load values
_loadvari28y(1,1,1) = 0.
_loadvari28y(2,1,1) = 0.


*DIM,_loadvari28z,TABLE,2,1,1,TIME,
! Time values
_loadvari28z(1,0,1) = 0.
_loadvari28z(2,0,1) = 1.
! Load values
_loadvari28z(1,1,1) = 0.
_loadvari28z(2,1,1) = 0.

/com,*********** Define Force Using Surface Effect Elements ***********
local,14,0,0.,0.,0.,-0.,0.,0.
csys,0
et,4,154
eblock,10,,,178
(15i9)
     8867        4        4        4       14      711     1266     1244     1244     6797     9824     1244     6796
     8868        4        4        4       14      246      245     1234     1234     4335     4337     1234     4343
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-1
esel,s,type,,4
keyop,4,2,1                ! Apply load in local coordinate system
keyop,4,7,1                ! Use original area so load is constant in large deformation
keyop,4,11,2               ! Use real and not project area
esel,all

*DIM,_loadvari30x,TABLE,2,1,1,TIME,
! Time values
_loadvari30x(1,0,1) = 0.
_loadvari30x(2,0,1) = 1.
! Load values
_loadvari30x(1,1,1) = -9072.37604572107
_loadvari30x(2,1,1) = -9072.37604572107


*DIM,_loadvari30y,TABLE,2,1,1,TIME,
! Time values
_loadvari30y(1,0,1) = 0.
_loadvari30y(2,0,1) = 1.
! Load values
_loadvari30y(1,1,1) = 0.
_loadvari30y(2,1,1) = 0.


*DIM,_loadvari30z,TABLE,2,1,1,TIME,
! Time values
_loadvari30z(1,0,1) = 0.
_loadvari30z(2,0,1) = 1.
! Load values
_loadvari30z(1,1,1) = 0.
_loadvari30z(2,1,1) = 0.

/com,*********** Define Force Using Surface Effect Elements ***********
local,15,0,0.,0.,0.,-0.,0.,0.
csys,0
et,5,154
eblock,10,,,200
(15i9)
     9045        5        5        5       15      245      246     1295     1295     4335     4345     1295     4338
     9046        5        5        5       15      249      276      272      272     4364     4514      272     4363
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-1
esel,s,type,,5
keyop,5,2,1                ! Apply load in local coordinate system
keyop,5,7,1                ! Use original area so load is constant in large deformation
keyop,5,11,2               ! Use real and not project area
esel,all

*DIM,_loadvari32x,TABLE,2,1,1,TIME,
! Time values
_loadvari32x(1,0,1) = 0.
_loadvari32x(2,0,1) = 1.
! Load values
_loadvari32x(1,1,1) = -9072.37632115142
_loadvari32x(2,1,1) = -9072.37632115142


*DIM,_loadvari32y,TABLE,2,1,1,TIME,
! Time values
_loadvari32y(1,0,1) = 0.
_loadvari32y(2,0,1) = 1.
! Load values
_loadvari32y(1,1,1) = 0.
_loadvari32y(2,1,1) = 0.


*DIM,_loadvari32z,TABLE,2,1,1,TIME,
! Time values
_loadvari32z(1,0,1) = 0.
_loadvari32z(2,0,1) = 1.
! Load values
_loadvari32z(1,1,1) = 0.
_loadvari32z(2,1,1) = 0.

fini
/com,****************************************************************************
/com,*************************    SOLUTION       ********************************
/com,****************************************************************************
/solu
antype,0                   ! static analysis
solc,on,on                 ! Turn on solution control with ability to use contact time prediction
eqsl,pcg,1e-8,,,,,,1
cntr,print,1               ! print out contact info and also make no initial contact an error
nldiag,cont,iter           ! print out contact info each equilibrium iteration
resc,,none                 ! Do not keep any restart files
/com,****************************************************
/com,******************* SOLVE FOR LS 1 ****************
esel,s,type,,2
nsle
sfe,all,1,pres,1,%_loadvari26x%
sfe,all,2,pres,1,%_loadvari26y%
sfe,all,3,pres,1,%_loadvari26z%
esel,s,type,,3
nsle
sfe,all,1,pres,1,%_loadvari28x%
sfe,all,2,pres,1,%_loadvari28y%
sfe,all,3,pres,1,%_loadvari28z%
esel,s,type,,4
nsle
sfe,all,1,pres,1,%_loadvari30x%
sfe,all,2,pres,1,%_loadvari30y%
sfe,all,3,pres,1,%_loadvari30z%
esel,s,type,,5
nsle
sfe,all,1,pres,1,%_loadvari32x%
sfe,all,2,pres,1,%_loadvari32y%
sfe,all,3,pres,1,%_loadvari32z%
nsel,all
esel,all
nsub,1,1,1
time,1.
outres,erase
outres,all,none
outres,nsol,all
outres,rsol,all
outres,strs,all
outres,epel,all
outres,eppl,all
stabilize,off                   ! Stabilization turned OFF by user
! *********** WB SOLVE COMMAND ***********
! check interactive state
*get,ANSINTER_,active,,int
*if,ANSINTER_,ne,0,then
/eof
*endif
solve
/com *************** Write FE CONNECTORS *********
CEWRITE,file,ce,,INTE
/com,****************************************************
/com,*************** FINISHED SOLVE FOR LS 1 *************
*set,_DS_PROGRESS          ! turn off progress updates to avoid virus scanning bug
*get,_PCGITER,active,,solu,cgiter
/post1
fini
